*Heading
** Job name: BakeCubeTransient Model name: Model-1
** Generated by: Abaqus/CAE 2025
*Preprint, echo=NO, model=NO, history=NO, contact=NO
**
** PARTS
**
*Part, name=Cube
*Node
      1,         -0.5,         -0.5,           1.
      2,         -0.5, -0.400000006,           1.
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*Element, type=C3D8T
   1,  122,  123,  134,  133,    1,    2,   13,   12
   2,  123,  124,  135,  134,    2,    3,   14,   13
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*Nset, nset=Set-1, generate
    1,  1331,     1
*Elset, elset=Set-1, generate
    1,  1000,     1
** Section: Aluminum-Section
*Solid Section, elset=Set-1, material=Aluminum
,
*End Part
**
**
** ASSEMBLY
**
*Assembly, name=Assembly
**
*Instance, name=Cube-1, part=Cube
*End Instance
**
*Nset, nset=All-Surfaces, instance=Cube-1, generate
    1,  1331,     1
*Elset, elset=All-Surfaces, instance=Cube-1, generate
    1,  1000,     1
*Nset, nset=Set-1, instance=Cube-1
  111,  112,  113,  114,  115,  116
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*Elset, elset=Set-1, instance=Cube-1
   91,   92,   93,   94,   95,   96
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*Elset, elset=_All-Surfaces_S1, internal, instance=Cube-1, generate
  901,  1000,     1
*Elset, elset=_All-Surfaces_S6, internal, instance=Cube-1, generate
   1,  991,   10
*Elset, elset=_All-Surfaces_S2, internal, instance=Cube-1, generate
   1,  100,    1
*Elset, elset=_All-Surfaces_S4, internal, instance=Cube-1, generate
   10,  1000,    10
*Elset, elset=_All-Surfaces_S3, internal, instance=Cube-1
   1,   2,   3,   4,   5,   6
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*Elset, elset=_All-Surfaces_S5, internal, instance=Cube-1
   91,   92,   93,   94,   95,   96
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*Surface, type=ELEMENT, name=All-Surfaces
_All-Surfaces_S1, S1
_All-Surfaces_S6, S6
_All-Surfaces_S2, S2
_All-Surfaces_S4, S4
_All-Surfaces_S3, S3
_All-Surfaces_S5, S5
*Elset, elset=_Surf-1_S4, internal, instance=Cube-1, generate
   10,  1000,    10
*Surface, type=ELEMENT, name=Surf-1
_Surf-1_S4, S4
*Elset, elset=_Surf-2_S2, internal, instance=Cube-1, generate
   1,  100,    1
*Surface, type=ELEMENT, name=Surf-2
_Surf-2_S2, S2
*Elset, elset=_Surf-3_S6, internal, instance=Cube-1, generate
   1,  991,   10
*Surface, type=ELEMENT, name=Surf-3
_Surf-3_S6, S6
*Elset, elset=_Surf-4_S1, internal, instance=Cube-1, generate
  901,  1000,     1
*Surface, type=ELEMENT, name=Surf-4
_Surf-4_S1, S1
*End Assembly
*Amplitude, name=Bake1
             0.,              1.,              1.,              0.,              2.,              0.,              3.,              0.
             4.,              1.
*Amplitude, name=Bake2
             0.,              0.,              1.,              1.,              2.,              0.,              3.,              0.
             4.,              0.
*Amplitude, name=Bake3
             0.,              0.,              1.,              0.,              2.,              1.,              3.,              0.
             4.,              0.
*Amplitude, name=Bake4
             0.,              0.,              1.,              0.,              2.,              0.,              3.,              1.
             4.,              0.
*Amplitude, name=InstantVacuum
             0.,              1.,              4.,              1.
**
** MATERIALS
**
*Material, name=Aluminum
*Conductivity
237.,
*Density
2300.,
*Elastic
 7e+10, 0.3
*Expansion
 5e-06,
*Specific Heat
900.,
**
** PHYSICAL CONSTANTS
**
*Physical Constants, absolute zero=0., stefan boltzmann=5.67e-08
**
** PREDEFINED FIELDS
**
** Name: Temp0   Type: Temperature
*Initial Conditions, type=TEMPERATURE
All-Surfaces, 4.
** ----------------------------------------------------------------
**
** STEP: Bake
**
*Step, name=Bake, nlgeom=NO
*Coupled Temperature-displacement, creep=none, deltmx=5.
0.2, 4., 4e-05, 0.2
**
** LOADS
**
** Name: Bake1   Type: Surface heat flux
*Dsflux, amplitude=Bake1
Surf-1, S, 1360.
** Name: Bake2   Type: Surface heat flux
*Dsflux, amplitude=Bake2
Surf-2, S, 1360.
** Name: Bake3   Type: Surface heat flux
*Dsflux, amplitude=Bake3
Surf-3, S, 1360.
** Name: Bake4   Type: Surface heat flux
*Dsflux, amplitude=Bake4
Surf-4, S, 1360.
**
** INTERACTIONS
**
** Interaction: ToVacuum
*Sradiate, amplitude=InstantVacuum
All-Surfaces, R, 4., 1.
**
** OUTPUT REQUESTS
**
*Restart, write, frequency=0
**
** FIELD OUTPUT: F-Output-1
**
*Output, field, variable=PRESELECT
**
** HISTORY OUTPUT: H-Output-1
**
*Output, history, variable=PRESELECT
*End Step
