*Heading
** Job name: BakeStrip Model name: Model-1
** Generated by: Abaqus/CAE 2025
*Preprint, echo=NO, model=NO, history=NO, contact=NO
**
** PARTS
**
*Part, name=SMAStrip
*Node
      1,           0.,           0.,           0.
      2, 0.0199999996,           0.,           0.
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*Element, type=S4RT
  1,   1,   2,  53,  52
  2,   2,   3,  54,  53
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*Nset, nset=Set-9, generate
   1,  306,    1
*Elset, elset=Set-9, generate
   1,  250,    1
** Section: Section-2
*Shell Section, elset=Set-9, composite
0.0025, 3, Alum, 0., a
0.0025, 3, FakeSMA, 0., b
*End Part
**
**
** ASSEMBLY
**
*Assembly, name=Assembly
**
*Instance, name=SMAStrip-1, part=SMAStrip
*End Instance
**
*Nset, nset=Set-4, instance=SMAStrip-1, generate
   1,  256,   51
*Elset, elset=Set-4, instance=SMAStrip-1, generate
   1,  201,   50
*Nset, nset=Set-5, instance=SMAStrip-1, generate
   1,  306,    1
*Elset, elset=Set-5, instance=SMAStrip-1, generate
   1,  250,    1
*Elset, elset=_Surf-3_SPOS, internal, instance=SMAStrip-1, generate
   1,  250,    1
*Surface, type=ELEMENT, name=Surf-3
_Surf-3_SPOS, SPOS
*Elset, elset=_Surf-4_SNEG, internal, instance=SMAStrip-1, generate
   1,  250,    1
*Surface, type=ELEMENT, name=Surf-4
_Surf-4_SNEG, SNEG
*End Assembly
**
** MATERIALS
**
*Material, name=Alum
*Conductivity
100.,
*Density
2300.,
*Elastic
 7e+10, 0.3
*Expansion
0.,
*Specific Heat
897.,
*Material, name=FakeSMA
*Conductivity
50.,
*Density
6450.,
*Elastic
 7e+10, 0.3
*Expansion
 0.0025,
*Specific Heat
800.,
**
** PHYSICAL CONSTANTS
**
*Physical Constants, absolute zero=0., stefan boltzmann=5.67e-08
**
** PREDEFINED FIELDS
**
** Name: Temp0   Type: Temperature
*Initial Conditions, type=TEMPERATURE
Set-5, 4., 4., 4., 4., 4.
** ----------------------------------------------------------------
**
** STEP: Heat
**
*Step, name=Heat, nlgeom=YES
*Coupled Temperature-displacement, creep=none, deltmx=5.
2., 100., 0.0001, 4.
**
** BOUNDARY CONDITIONS
**
** Name: FixRoot Type: Symmetry/Antisymmetry/Encastre
*Boundary
Set-4, ENCASTRE
**
** LOADS
**
** Name: Bake   Type: Surface heat flux Using Field: AnalyticalField-1
*Dflux
SMAStrip-1.1, SPOS, 1020.75
SMAStrip-1.2, SPOS, 1020.75
SMAStrip-1.3, SPOS, 1020.75
SMAStrip-1.4, SPOS, 1020.75
SMAStrip-1.5, SPOS, 1020.75
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SMAStrip-1.250, SPOS, 1020.75
**
** INTERACTIONS
**
** Interaction: ToVacuum
*Sradiate
Surf-4, R, 4., 1.
**
** OUTPUT REQUESTS
**
*Restart, write, frequency=0
**
** FIELD OUTPUT: F-Output-1
**
*Output, field, variable=PRESELECT
**
** HISTORY OUTPUT: H-Output-1
**
*Output, history, variable=PRESELECT
*End Step
