*Heading
** Job name: BakeTransient2 Model name: Model-1
** Generated by: Abaqus/CAE 2025
*Preprint, echo=NO, model=NO, history=NO, contact=NO
**
** PARTS
**
*Part, name=Cylinder-(Aluminum)
*Node
      1,  0.478470176,  0.938596547,  0.374303043
      2,  0.440960646,  0.983874559,  0.295879215
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*Element, type=C3D8T
   1,   139,    77,     5,    32,   622,   560,   488,   515
   2,   405,   404,     6,    34,   888,   887,   489,   517
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*Nset, nset=Set-3, generate
     1,  10143,      1
*Elset, elset=Set-3, generate
    1,  9000,     1
** Section: Aluminum-Section
*Solid Section, elset=Set-3, material=Aluminum
,
*End Part
**
**
** ASSEMBLY
**
*Assembly, name=Assembly
**
*Instance, name=Cylinder-(Aluminum), part=Cylinder-(Aluminum)
*End Instance
**
*Nset, nset=Fixed-Set, instance=Cylinder-(Aluminum), generate
  9661,  10143,      1
*Elset, elset=Fixed-Set, instance=Cylinder-(Aluminum), generate
 8551,  9000,     1
*Nset, nset=Set-1, instance=Cylinder-(Aluminum), generate
     1,  10143,      1
*Elset, elset=Set-1, instance=Cylinder-(Aluminum), generate
    1,  9000,     1
*Elset, elset=_All-Surfaces_S5, internal, instance=Cylinder-(Aluminum)
    1,    2,    3,    4,    6,    9
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*Elset, elset=_All-Surfaces_S3, internal, instance=Cylinder-(Aluminum)
    7,    8,   10,   12,   16,   19
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*Elset, elset=_All-Surfaces_S6, internal, instance=Cylinder-(Aluminum), generate
   28,  8578,   450
*Elset, elset=_All-Surfaces_S2, internal, instance=Cylinder-(Aluminum), generate
 8551,  9000,     1
*Elset, elset=_All-Surfaces_S1, internal, instance=Cylinder-(Aluminum), generate
   1,  450,    1
*Surface, type=ELEMENT, name=All-Surfaces
_All-Surfaces_S5, S5
_All-Surfaces_S3, S3
_All-Surfaces_S6, S6
_All-Surfaces_S2, S2
_All-Surfaces_S1, S1
*End Assembly
*Amplitude, name=InstantVacuum
             0.,              1.,              4.,              1.
**
** MATERIALS
**
*Material, name=Aluminum
*Conductivity
237.,
*Density
2300.,
*Elastic
 7e+10, 0.3
*Expansion
 5e-06,
*Specific Heat
900.,
**
** PHYSICAL CONSTANTS
**
*Physical Constants, absolute zero=0., stefan boltzmann=5.67e-08
**
** PREDEFINED FIELDS
**
** Name: Temp0   Type: Temperature
*Initial Conditions, type=TEMPERATURE
Set-1, 4.
** ----------------------------------------------------------------
**
** STEP: Bake
**
*Step, name=Bake, nlgeom=NO
*Coupled Temperature-displacement, creep=none, deltmx=5.
0.2, 4., 4e-05, 0.2
**
** BOUNDARY CONDITIONS
**
** Name: FixFace Type: Symmetry/Antisymmetry/Encastre
*Boundary
Fixed-Set, ENCASTRE
**
** LOADS
**
** Name: Load-1   Type: Surface heat flux Using Field: AnalyticalField-1
*Dflux
Cylinder-(Aluminum).10, S3, 42.3962
Cylinder-(Aluminum).11, S5, 50.3759
Cylinder-(Aluminum).12, S3, 79.148
Cylinder-(Aluminum).13, S5, 87.2776
Cylinder-(Aluminum).14, S5, 110.969
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Cylinder-(Aluminum).446, S1, 68.05
**
** INTERACTIONS
**
** Interaction: ToVacuum
*Sradiate, amplitude=InstantVacuum
All-Surfaces, R, 4., 1.
**
** OUTPUT REQUESTS
**
*Restart, write, frequency=0
**
** FIELD OUTPUT: F-Output-1
**
*Output, field, variable=PRESELECT
**
** HISTORY OUTPUT: H-Output-1
**
*Output, history, variable=PRESELECT
*End Step
