*Heading
** Job name: SMAHeatTransient_04 Model name: SMAScenario1_Model
** Generated by: Abaqus/CAE 2025
*Preprint, echo=NO, model=NO, history=NO, contact=NO
*Restart, read, step=3
** ----------------------------------------------------------------
**
** STEP: Heat_04
**
*Step, name=Heat_04, nlgeom=YES, inc=200
*Coupled Temperature-displacement, creep=none, deltmx=5.
0.1, 20., 4e-05, 5.
**
** LOADS
**
** Name: SolarFlux   Type: Surface heat flux Using Field: FluxField_04
*Dflux
SMAStrip_(Nitinol).1, SPOS, 500.244
SMAStrip_(Nitinol).2, SPOS, 498.754
SMAStrip_(Nitinol).3, SPOS, 495.926
SMAStrip_(Nitinol).4, SPOS, 494.358
SMAStrip_(Nitinol).5, SPOS, 491.897
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SMAStrip_(Nitinol).1000, SPOS, 307.302
**
** OUTPUT REQUESTS
**
*Restart, write, overlay, frequency=1
**
** FIELD OUTPUT: F-Output-HFL
**
*Output, field
*Element Output, directions=YES
HFL,
**
** FIELD OUTPUT: F-Output-1
**
*Output, field, variable=PRESELECT
**
** HISTORY OUTPUT: H-Output-1
**
*Output, history, variable=PRESELECT
*End Step
