*Heading
 Iteration 5
** Job name: SMAHeatTransient_05 Model name: Model_05
** Generated by: Abaqus/CAE 2025
*Preprint, echo=NO, model=NO, history=NO, contact=NO
*Restart, read, step=4
** ----------------------------------------------------------------
**
** STEP: Heat_05
**
*Step, name=Heat_05, nlgeom=NO, inc=200
*Coupled Temperature-displacement, creep=none, deltmx=2.
0.5, 10., 4e-05, 5.
**
** LOADS
**
** Name: Load_01   Type: Surface heat flux Using Field: AnalyticalField-1
*Dflux, op=NEW
"SMAStrip (Nitinol)".1, SPOS, 937.798
"SMAStrip (Nitinol)".2, SPOS, 984.758
"SMAStrip (Nitinol)".3, SPOS, 992.955
"SMAStrip (Nitinol)".4, SPOS, 993.193
"SMAStrip (Nitinol)".5, SPOS, 987.757
"SMAStrip (Nitinol)".6, SPOS, 978.978
"SMAStrip (Nitinol)".7, SPOS, 967.582
"SMAStrip (Nitinol)".8, SPOS, 949.482
"SMAStrip (Nitinol)".9, SPOS, 927.87
"SMAStrip (Nitinol)".51, SPOS, 962.906
"SMAStrip (Nitinol)".52, SPOS, 986.842
"SMAStrip (Nitinol)".53, SPOS, 995.463
"SMAStrip (Nitinol)".54, SPOS, 995.996
"SMAStrip (Nitinol)".55, SPOS, 989.874
"SMAStrip (Nitinol)".56, SPOS, 981.096
"SMAStrip (Nitinol)".57, SPOS, 969.753
"SMAStrip (Nitinol)".58, SPOS, 952.118
"SMAStrip (Nitinol)".59, SPOS, 929.01
"SMAStrip (Nitinol)".101, SPOS, 962.253
"SMAStrip (Nitinol)".102, SPOS, 989.963
"SMAStrip (Nitinol)".103, SPOS, 997.022
"SMAStrip (Nitinol)".104, SPOS, 999.143
"SMAStrip (Nitinol)".105, SPOS, 993.675
"SMAStrip (Nitinol)".106, SPOS, 984.675
"SMAStrip (Nitinol)".107, SPOS, 971.619
"SMAStrip (Nitinol)".108, SPOS, 952.946
"SMAStrip (Nitinol)".109, SPOS, 929.212
"SMAStrip (Nitinol)".110, SPOS, 904.446
"SMAStrip (Nitinol)".151, SPOS, 956.093
"SMAStrip (Nitinol)".152, SPOS, 985.723
"SMAStrip (Nitinol)".153, SPOS, 995.919
"SMAStrip (Nitinol)".154, SPOS, 996.622
"SMAStrip (Nitinol)".155, SPOS, 991.193
"SMAStrip (Nitinol)".156, SPOS, 983.09
"SMAStrip (Nitinol)".157, SPOS, 968.904
"SMAStrip (Nitinol)".158, SPOS, 953.269
"SMAStrip (Nitinol)".159, SPOS, 930.139
"SMAStrip (Nitinol)".160, SPOS, 905.767
"SMAStrip (Nitinol)".201, SPOS, 942.393
"SMAStrip (Nitinol)".202, SPOS, 970.464
"SMAStrip (Nitinol)".203, SPOS, 993.08
"SMAStrip (Nitinol)".204, SPOS, 993.793
"SMAStrip (Nitinol)".205, SPOS, 991.574
"SMAStrip (Nitinol)".206, SPOS, 979.228
"SMAStrip (Nitinol)".207, SPOS, 969.005
"SMAStrip (Nitinol)".208, SPOS, 952.336
"SMAStrip (Nitinol)".209, SPOS, 928.689
"SMAStrip (Nitinol)".210, SPOS, 903.048
** Name: Load_02   Type: Surface heat flux Using Field: AnalyticalField-1
*Dflux, op=NEW
"SMAStrip (Nitinol)".1, SPOS, 937.798
"SMAStrip (Nitinol)".2, SPOS, 984.758
"SMAStrip (Nitinol)".3, SPOS, 992.955
"SMAStrip (Nitinol)".4, SPOS, 993.193
"SMAStrip (Nitinol)".5, SPOS, 987.757
"SMAStrip (Nitinol)".6, SPOS, 978.978
"SMAStrip (Nitinol)".7, SPOS, 967.582
"SMAStrip (Nitinol)".8, SPOS, 949.482
"SMAStrip (Nitinol)".9, SPOS, 927.87
"SMAStrip (Nitinol)".51, SPOS, 962.906
"SMAStrip (Nitinol)".52, SPOS, 986.842
"SMAStrip (Nitinol)".53, SPOS, 995.463
"SMAStrip (Nitinol)".54, SPOS, 995.996
"SMAStrip (Nitinol)".55, SPOS, 989.874
"SMAStrip (Nitinol)".56, SPOS, 981.096
"SMAStrip (Nitinol)".57, SPOS, 969.753
"SMAStrip (Nitinol)".58, SPOS, 952.118
"SMAStrip (Nitinol)".59, SPOS, 929.01
"SMAStrip (Nitinol)".101, SPOS, 962.253
"SMAStrip (Nitinol)".102, SPOS, 989.963
"SMAStrip (Nitinol)".103, SPOS, 997.022
"SMAStrip (Nitinol)".104, SPOS, 999.143
"SMAStrip (Nitinol)".105, SPOS, 993.675
"SMAStrip (Nitinol)".106, SPOS, 984.675
"SMAStrip (Nitinol)".107, SPOS, 971.619
"SMAStrip (Nitinol)".108, SPOS, 952.946
"SMAStrip (Nitinol)".109, SPOS, 929.212
"SMAStrip (Nitinol)".110, SPOS, 904.446
"SMAStrip (Nitinol)".151, SPOS, 956.093
"SMAStrip (Nitinol)".152, SPOS, 985.723
"SMAStrip (Nitinol)".153, SPOS, 995.919
"SMAStrip (Nitinol)".154, SPOS, 996.622
"SMAStrip (Nitinol)".155, SPOS, 991.193
"SMAStrip (Nitinol)".156, SPOS, 983.09
"SMAStrip (Nitinol)".157, SPOS, 968.904
"SMAStrip (Nitinol)".158, SPOS, 953.269
"SMAStrip (Nitinol)".159, SPOS, 930.139
"SMAStrip (Nitinol)".160, SPOS, 905.767
"SMAStrip (Nitinol)".201, SPOS, 942.393
"SMAStrip (Nitinol)".202, SPOS, 970.464
"SMAStrip (Nitinol)".203, SPOS, 993.08
"SMAStrip (Nitinol)".204, SPOS, 993.793
"SMAStrip (Nitinol)".205, SPOS, 991.574
"SMAStrip (Nitinol)".206, SPOS, 979.228
"SMAStrip (Nitinol)".207, SPOS, 969.005
"SMAStrip (Nitinol)".208, SPOS, 952.336
"SMAStrip (Nitinol)".209, SPOS, 928.689
"SMAStrip (Nitinol)".210, SPOS, 903.048
** Name: Load_03   Type: Surface heat flux Using Field: AnalyticalField-1
*Dflux, op=NEW
"SMAStrip (Nitinol)".1, SPOS, 937.798
"SMAStrip (Nitinol)".2, SPOS, 984.758
"SMAStrip (Nitinol)".3, SPOS, 992.955
"SMAStrip (Nitinol)".4, SPOS, 993.193
"SMAStrip (Nitinol)".5, SPOS, 987.757
"SMAStrip (Nitinol)".6, SPOS, 978.978
"SMAStrip (Nitinol)".7, SPOS, 967.582
"SMAStrip (Nitinol)".8, SPOS, 949.482
"SMAStrip (Nitinol)".9, SPOS, 927.87
"SMAStrip (Nitinol)".51, SPOS, 962.906
"SMAStrip (Nitinol)".52, SPOS, 986.842
"SMAStrip (Nitinol)".53, SPOS, 995.463
"SMAStrip (Nitinol)".54, SPOS, 995.996
"SMAStrip (Nitinol)".55, SPOS, 989.874
"SMAStrip (Nitinol)".56, SPOS, 981.096
"SMAStrip (Nitinol)".57, SPOS, 969.753
"SMAStrip (Nitinol)".58, SPOS, 952.118
"SMAStrip (Nitinol)".59, SPOS, 929.01
"SMAStrip (Nitinol)".101, SPOS, 962.253
"SMAStrip (Nitinol)".102, SPOS, 989.963
"SMAStrip (Nitinol)".103, SPOS, 997.022
"SMAStrip (Nitinol)".104, SPOS, 999.143
"SMAStrip (Nitinol)".105, SPOS, 993.675
"SMAStrip (Nitinol)".106, SPOS, 984.675
"SMAStrip (Nitinol)".107, SPOS, 971.619
"SMAStrip (Nitinol)".108, SPOS, 952.946
"SMAStrip (Nitinol)".109, SPOS, 929.212
"SMAStrip (Nitinol)".110, SPOS, 904.446
"SMAStrip (Nitinol)".151, SPOS, 956.093
"SMAStrip (Nitinol)".152, SPOS, 985.723
"SMAStrip (Nitinol)".153, SPOS, 995.919
"SMAStrip (Nitinol)".154, SPOS, 996.622
"SMAStrip (Nitinol)".155, SPOS, 991.193
"SMAStrip (Nitinol)".156, SPOS, 983.09
"SMAStrip (Nitinol)".157, SPOS, 968.904
"SMAStrip (Nitinol)".158, SPOS, 953.269
"SMAStrip (Nitinol)".159, SPOS, 930.139
"SMAStrip (Nitinol)".160, SPOS, 905.767
"SMAStrip (Nitinol)".201, SPOS, 942.393
"SMAStrip (Nitinol)".202, SPOS, 970.464
"SMAStrip (Nitinol)".203, SPOS, 993.08
"SMAStrip (Nitinol)".204, SPOS, 993.793
"SMAStrip (Nitinol)".205, SPOS, 991.574
"SMAStrip (Nitinol)".206, SPOS, 979.228
"SMAStrip (Nitinol)".207, SPOS, 969.005
"SMAStrip (Nitinol)".208, SPOS, 952.336
"SMAStrip (Nitinol)".209, SPOS, 928.689
"SMAStrip (Nitinol)".210, SPOS, 903.048
** Name: Load_04   Type: Surface heat flux Using Field: AnalyticalField-1
*Dflux, op=NEW
"SMAStrip (Nitinol)".1, SPOS, 937.798
"SMAStrip (Nitinol)".2, SPOS, 984.758
"SMAStrip (Nitinol)".3, SPOS, 992.955
"SMAStrip (Nitinol)".4, SPOS, 993.193
"SMAStrip (Nitinol)".5, SPOS, 987.757
"SMAStrip (Nitinol)".6, SPOS, 978.978
"SMAStrip (Nitinol)".7, SPOS, 967.582
"SMAStrip (Nitinol)".8, SPOS, 949.482
"SMAStrip (Nitinol)".9, SPOS, 927.87
"SMAStrip (Nitinol)".51, SPOS, 962.906
"SMAStrip (Nitinol)".52, SPOS, 986.842
"SMAStrip (Nitinol)".53, SPOS, 995.463
"SMAStrip (Nitinol)".54, SPOS, 995.996
"SMAStrip (Nitinol)".55, SPOS, 989.874
"SMAStrip (Nitinol)".56, SPOS, 981.096
"SMAStrip (Nitinol)".57, SPOS, 969.753
"SMAStrip (Nitinol)".58, SPOS, 952.118
"SMAStrip (Nitinol)".59, SPOS, 929.01
"SMAStrip (Nitinol)".101, SPOS, 962.253
"SMAStrip (Nitinol)".102, SPOS, 989.963
"SMAStrip (Nitinol)".103, SPOS, 997.022
"SMAStrip (Nitinol)".104, SPOS, 999.143
"SMAStrip (Nitinol)".105, SPOS, 993.675
"SMAStrip (Nitinol)".106, SPOS, 984.675
"SMAStrip (Nitinol)".107, SPOS, 971.619
"SMAStrip (Nitinol)".108, SPOS, 952.946
"SMAStrip (Nitinol)".109, SPOS, 929.212
"SMAStrip (Nitinol)".110, SPOS, 904.446
"SMAStrip (Nitinol)".151, SPOS, 956.093
"SMAStrip (Nitinol)".152, SPOS, 985.723
"SMAStrip (Nitinol)".153, SPOS, 995.919
"SMAStrip (Nitinol)".154, SPOS, 996.622
"SMAStrip (Nitinol)".155, SPOS, 991.193
"SMAStrip (Nitinol)".156, SPOS, 983.09
"SMAStrip (Nitinol)".157, SPOS, 968.904
"SMAStrip (Nitinol)".158, SPOS, 953.269
"SMAStrip (Nitinol)".159, SPOS, 930.139
"SMAStrip (Nitinol)".160, SPOS, 905.767
"SMAStrip (Nitinol)".201, SPOS, 942.393
"SMAStrip (Nitinol)".202, SPOS, 970.464
"SMAStrip (Nitinol)".203, SPOS, 993.08
"SMAStrip (Nitinol)".204, SPOS, 993.793
"SMAStrip (Nitinol)".205, SPOS, 991.574
"SMAStrip (Nitinol)".206, SPOS, 979.228
"SMAStrip (Nitinol)".207, SPOS, 969.005
"SMAStrip (Nitinol)".208, SPOS, 952.336
"SMAStrip (Nitinol)".209, SPOS, 928.689
"SMAStrip (Nitinol)".210, SPOS, 903.048
** Name: Load_05   Type: Surface heat flux Using Field: AnalyticalField-1
*Dflux, op=NEW
"SMAStrip (Nitinol)".1, SPOS, 937.798
"SMAStrip (Nitinol)".2, SPOS, 984.758
"SMAStrip (Nitinol)".3, SPOS, 992.955
"SMAStrip (Nitinol)".4, SPOS, 993.193
"SMAStrip (Nitinol)".5, SPOS, 987.757
"SMAStrip (Nitinol)".6, SPOS, 978.978
"SMAStrip (Nitinol)".7, SPOS, 967.582
"SMAStrip (Nitinol)".8, SPOS, 949.482
"SMAStrip (Nitinol)".9, SPOS, 927.87
"SMAStrip (Nitinol)".51, SPOS, 962.906
"SMAStrip (Nitinol)".52, SPOS, 986.842
"SMAStrip (Nitinol)".53, SPOS, 995.463
"SMAStrip (Nitinol)".54, SPOS, 995.996
"SMAStrip (Nitinol)".55, SPOS, 989.874
"SMAStrip (Nitinol)".56, SPOS, 981.096
"SMAStrip (Nitinol)".57, SPOS, 969.753
"SMAStrip (Nitinol)".58, SPOS, 952.118
"SMAStrip (Nitinol)".59, SPOS, 929.01
"SMAStrip (Nitinol)".101, SPOS, 962.253
"SMAStrip (Nitinol)".102, SPOS, 989.963
"SMAStrip (Nitinol)".103, SPOS, 997.022
"SMAStrip (Nitinol)".104, SPOS, 999.143
"SMAStrip (Nitinol)".105, SPOS, 993.675
"SMAStrip (Nitinol)".106, SPOS, 984.675
"SMAStrip (Nitinol)".107, SPOS, 971.619
"SMAStrip (Nitinol)".108, SPOS, 952.946
"SMAStrip (Nitinol)".109, SPOS, 929.212
"SMAStrip (Nitinol)".110, SPOS, 904.446
"SMAStrip (Nitinol)".151, SPOS, 956.093
"SMAStrip (Nitinol)".152, SPOS, 985.723
"SMAStrip (Nitinol)".153, SPOS, 995.919
"SMAStrip (Nitinol)".154, SPOS, 996.622
"SMAStrip (Nitinol)".155, SPOS, 991.193
"SMAStrip (Nitinol)".156, SPOS, 983.09
"SMAStrip (Nitinol)".157, SPOS, 968.904
"SMAStrip (Nitinol)".158, SPOS, 953.269
"SMAStrip (Nitinol)".159, SPOS, 930.139
"SMAStrip (Nitinol)".160, SPOS, 905.767
"SMAStrip (Nitinol)".201, SPOS, 942.393
"SMAStrip (Nitinol)".202, SPOS, 970.464
"SMAStrip (Nitinol)".203, SPOS, 993.08
"SMAStrip (Nitinol)".204, SPOS, 993.793
"SMAStrip (Nitinol)".205, SPOS, 991.574
"SMAStrip (Nitinol)".206, SPOS, 979.228
"SMAStrip (Nitinol)".207, SPOS, 969.005
"SMAStrip (Nitinol)".208, SPOS, 952.336
"SMAStrip (Nitinol)".209, SPOS, 928.689
"SMAStrip (Nitinol)".210, SPOS, 903.048
**
** OUTPUT REQUESTS
**
*Restart, write, overlay, frequency=1
**
** FIELD OUTPUT: F-Output-1
**
*Output, field, variable=PRESELECT
**
** HISTORY OUTPUT: H-Output-1
**
*Output, history, variable=PRESELECT
*End Step
