*Heading
** Job name: SMAHeatTransient_09_template Model name: SMAScenario1_Model
** Generated by: Abaqus/CAE 2025
*Preprint, echo=NO, model=NO, history=NO, contact=NO
**
** PARTS
**
*Part, name=SMAStrip_(Nitinol)
*Node
      1,           0.,           0.,           0.
      2, 0.00999999978,           0.,           0.
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*Element, type=S4RT
   1,    1,    2,  103,  102
   2,    2,    3,  104,  103
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*Nset, nset=Set-1, generate
    1,  1111,     1
*Elset, elset=Set-1, generate
    1,  1000,     1
** Section: CompositeSection-1
*Shell Section, elset=Set-1, composite
0.0025, 3, Aluminum, 0., a
0.0025, 3, FakeSMA, 0., b
*End Part
**
**
** ASSEMBLY
**
*Assembly, name=Assembly
**
*Instance, name=SMAStrip_(Nitinol), part=SMAStrip_(Nitinol)
*End Instance
**
*Nset, nset=Fixed-Set, instance=SMAStrip_(Nitinol), generate
    1,  1011,   101
*Elset, elset=Fixed-Set, instance=SMAStrip_(Nitinol), generate
   1,  901,  100
*Nset, nset=Set-Temp, instance=SMAStrip_(Nitinol), generate
    1,  1111,     1
*Elset, elset=Set-Temp, instance=SMAStrip_(Nitinol), generate
    1,  1000,     1
*Elset, elset=_All-Surfaces_SPOS, internal, instance=SMAStrip_(Nitinol), generate
    1,  1000,     1
*Surface, type=ELEMENT, name=All-Surfaces
_All-Surfaces_SPOS, SPOS
*End Assembly
*Amplitude, name=InstantVacuum
             0.,              1.,              4.,              1.
**
** MATERIALS
**
*Material, name=Aluminum
*Conductivity
100.,
*Density
2300.,
*Elastic
 7e+10, 0.3
*Expansion
0.,
*Specific Heat
900.,
*Material, name=FakeSMA
*Conductivity
50.,
*Density
6450.,
*Elastic
 9e+10, 0.3
*Expansion
 0.0025,
*Specific Heat
800.,
**
** PHYSICAL CONSTANTS
**
*Physical Constants, absolute zero=0., stefan boltzmann=5.67e-08
**
** PREDEFINED FIELDS
**
** Name: Temp0   Type: Temperature
*Initial Conditions, type=TEMPERATURE
Set-Temp, 4., 4., 4., 4., 4.
** ----------------------------------------------------------------
**
** STEP: Heat_01
**
*Step, name=Heat_01, nlgeom=YES, inc=200
*Coupled Temperature-displacement, creep=none, deltmx=5.
0.1, 20., 4e-05, 5.
**
** BOUNDARY CONDITIONS
**
** Name: FixEdge Type: Symmetry/Antisymmetry/Encastre
*Boundary
Fixed-Set, ENCASTRE
**
** LOADS
**
** Name: Load_01   Type: Surface heat flux Using Field: Flux_Field_01
*Dflux
SMAStrip_(Nitinol).1, SPOS, 510.375
SMAStrip_(Nitinol).2, SPOS, 510.375
SMAStrip_(Nitinol).3, SPOS, 510.375
SMAStrip_(Nitinol).4, SPOS, 510.375
SMAStrip_(Nitinol).5, SPOS, 510.375
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SMAStrip_(Nitinol).1000, SPOS, 510.375
**
** INTERACTIONS
**
** Interaction: ToVacuum
*Sradiate, amplitude=InstantVacuum
All-Surfaces, R, 4., 0.75
**
** OUTPUT REQUESTS
**
*Restart, write, overlay, frequency=1
**
** FIELD OUTPUT: F-Output-HFL
**
*Output, field
*Element Output, directions=YES
HFL,
**
** FIELD OUTPUT: F-Output-1
**
*Output, field, variable=PRESELECT
**
** HISTORY OUTPUT: H-Output-1
**
*Output, history, variable=PRESELECT
*End Step
** ----------------------------------------------------------------
**
** STEP: Heat_02
**
*Step, name=Heat_02, nlgeom=YES, inc=200
*Coupled Temperature-displacement, creep=none, deltmx=5.
0.1, 20., 4e-05, 5.
**
** OUTPUT REQUESTS
**
*Restart, write, overlay, frequency=1
**
** FIELD OUTPUT: F-Output-HFL
**
*Output, field
*Element Output, directions=YES
HFL,
**
** FIELD OUTPUT: F-Output-1
**
*Output, field, variable=PRESELECT
**
** HISTORY OUTPUT: H-Output-1
**
*Output, history, variable=PRESELECT
*End Step
** ----------------------------------------------------------------
**
** STEP: Heat_03
**
*Step, name=Heat_03, nlgeom=YES, inc=200
*Coupled Temperature-displacement, creep=none, deltmx=5.
0.1, 20., 4e-05, 5.
**
** OUTPUT REQUESTS
**
*Restart, write, overlay, frequency=1
**
** FIELD OUTPUT: F-Output-HFL
**
*Output, field
*Element Output, directions=YES
HFL,
**
** FIELD OUTPUT: F-Output-1
**
*Output, field, variable=PRESELECT
**
** HISTORY OUTPUT: H-Output-1
**
*Output, history, variable=PRESELECT
*End Step
** ----------------------------------------------------------------
**
** STEP: Heat_04
**
*Step, name=Heat_04, nlgeom=YES, inc=200
*Coupled Temperature-displacement, creep=none, deltmx=5.
0.1, 20., 4e-05, 5.
**
** OUTPUT REQUESTS
**
*Restart, write, overlay, frequency=1
**
** FIELD OUTPUT: F-Output-HFL
**
*Output, field
*Element Output, directions=YES
HFL,
**
** FIELD OUTPUT: F-Output-1
**
*Output, field, variable=PRESELECT
**
** HISTORY OUTPUT: H-Output-1
**
*Output, history, variable=PRESELECT
*End Step
** ----------------------------------------------------------------
**
** STEP: Heat_05
**
*Step, name=Heat_05, nlgeom=YES, inc=200
*Coupled Temperature-displacement, creep=none, deltmx=5.
0.1, 20., 4e-05, 5.
**
** OUTPUT REQUESTS
**
*Restart, write, overlay, frequency=1
**
** FIELD OUTPUT: F-Output-HFL
**
*Output, field
*Element Output, directions=YES
HFL,
**
** FIELD OUTPUT: F-Output-1
**
*Output, field, variable=PRESELECT
**
** HISTORY OUTPUT: H-Output-1
**
*Output, history, variable=PRESELECT
*End Step
** ----------------------------------------------------------------
**
** STEP: Heat_06
**
*Step, name=Heat_06, nlgeom=YES, inc=200
*Coupled Temperature-displacement, creep=none, deltmx=5.
0.1, 20., 4e-05, 5.
**
** OUTPUT REQUESTS
**
*Restart, write, overlay, frequency=1
**
** FIELD OUTPUT: F-Output-HFL
**
*Output, field
*Element Output, directions=YES
HFL,
**
** FIELD OUTPUT: F-Output-1
**
*Output, field, variable=PRESELECT
**
** HISTORY OUTPUT: H-Output-1
**
*Output, history, variable=PRESELECT
*End Step
** ----------------------------------------------------------------
**
** STEP: Heat_07
**
*Step, name=Heat_07, nlgeom=YES, inc=200
*Coupled Temperature-displacement, creep=none, deltmx=5.
0.1, 20., 4e-05, 5.
**
** OUTPUT REQUESTS
**
*Restart, write, overlay, frequency=1
**
** FIELD OUTPUT: F-Output-HFL
**
*Output, field
*Element Output, directions=YES
HFL,
**
** FIELD OUTPUT: F-Output-1
**
*Output, field, variable=PRESELECT
**
** HISTORY OUTPUT: H-Output-1
**
*Output, history, variable=PRESELECT
*End Step
** ----------------------------------------------------------------
**
** STEP: Heat_08
**
*Step, name=Heat_08, nlgeom=YES, inc=200
*Coupled Temperature-displacement, creep=none, deltmx=5.
0.1, 20., 4e-05, 5.
**
** OUTPUT REQUESTS
**
*Restart, write, overlay, frequency=1
**
** FIELD OUTPUT: F-Output-HFL
**
*Output, field
*Element Output, directions=YES
HFL,
**
** FIELD OUTPUT: F-Output-1
**
*Output, field, variable=PRESELECT
**
** HISTORY OUTPUT: H-Output-1
**
*Output, history, variable=PRESELECT
*End Step
** ----------------------------------------------------------------
**
** STEP: Heat_09
**
*Step, name=Heat_09, nlgeom=YES, inc=200
*Coupled Temperature-displacement, creep=none, deltmx=5.
0.1, 20., 4e-05, 5.
**
** OUTPUT REQUESTS
**
*Restart, write, overlay, frequency=1
**
** FIELD OUTPUT: F-Output-HFL
**
*Output, field
*Element Output, directions=YES
HFL,
**
** FIELD OUTPUT: F-Output-1
**
*Output, field, variable=PRESELECT
**
** HISTORY OUTPUT: H-Output-1
**
*Output, history, variable=PRESELECT
*Dflux
SMAStrip_(Nitinol).1, SPOS, 415.714
SMAStrip_(Nitinol).2, SPOS, 397.665
SMAStrip_(Nitinol).3, SPOS, 376.872
SMAStrip_(Nitinol).4, SPOS, 369.734
SMAStrip_(Nitinol).5, SPOS, 342.023
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SMAStrip_(Nitinol).1000, SPOS, -952.014
*End Step
